# Calculations for the neck sim
Jmotor := 0.01 kg*m^2
dT := 0.00005
Kt := 0.2 N*m/A
Ke := Kt/sqrt(3) = 0.11547 V*s/rad
Ke.pp := Ke*sqrt(2) = 0.163299 Wb
R := 0.2 Ω
τ := 1.5 ms
L := τ*R = 0.3 mH
dT/L = 0.166667 1/H
Imax.pp := 10 A
Imax.rms := Imax.pp/sqrt(2) = 7.07107 A
τ.mech := 0.5*sec
acc.max := 1000*rad/sec^2
T.max := Kt*Imax.rms = 1.41421 N*m
J.mot := T.max/acc.max = 0.00141421 kg*m^2
KtOverJdT := Kt*dT/J.mot = 0.00707107 1/(s^2*A)
BOverJdT := τ.mech*dT = 2.5e-5 s
